P1000 := 0
p := 0.4
P1100 := 0
n1 := 0.5
P0100 := 0
n2 := 0.8
P1110 := 0
n3 := 0.8
P1010 := 0
P0110 := 0
P1111 := 0
P0111 := 0
P1001 := 0
P0101 := 0
P1101 := 0
P1011 := 0
Given
P1000 == p*P1000 + P1001*p*(1 - n3) + P1011*p*(1 - n2)*(1 - n3) + P1010*p*(1 - n2)
P1100 == p*n1*P1100 + P1111*p*(1 - n2)*(1 - n3)*n1 + P1001*(1 - p)*(1 - n3) + P1000*(1 - p) + P1011*(1 - p)*(1 - n2)*(1 - n3) + P1110*p*n1*(1 - n2) + P1010*(1 - p)*(1 - n2) + p*n1*(1 - n3)*P1101
P0100 == P0100*n1 + P1111*(1 - p)*n1*(1 - n2)*(1 - n3) + P1100*(1 - p)*n1 + P0101*n1*(1 - n3) + P1101*(1 - p)*n1*(1 - n3) + P0110*n1*(1 - n2) + P0111*n1*(1 - n2)*(1 - n3)
P1110 == P1110*p*n1*n2 + P1110*(1 - p)*(1 - n1)*(1 - n2) + P1011*(1 - p)*n2*(1 - n3) + P0110*(1 - n1)*(1 - n2) + P0111*(1 - n1)*(1 - n2)*(1 - n3) + P1101*(1 - p)*(1 - n1)*(1 - n3) + P0101*(1 - n1)*(1 - n3) + P1111*(1 - p)*(1 - n1)*(1 - n2)*(1 - n3) + P1111*p*n1*n2*(1 - n3) + P0100*(1 - n1) + P1010*(1 - p)*n2 + P1100*(1 - p)*(1 - n1)
P1010 == P1100*p*(1 - n1) + P1010*p*n2 + P1101*p*(1 - n1)*(1 - n3) + P1011*p*(1 - n1)*n2*(1 - n3) + P1110*p*(1 - n1)*(1 - n2) + P1111*p*(1 - n1)*(1 - n2)*(1 - n3)
P0110 == P0110*n1*n2 + P1111*(1 - p)*n1*n2*(1 - n3) + P0111*n1*n2*(1 - n3) + P1110*(1 - p)*n1*n2
P1111 == P1111*p*n1*n2*n3 + P1111*(1 - p)*(1 - n1)*n2*n3 + P1111*(1 - p)*(1 - n1)*n2*(1 - n3) + P1111*(1 - p)*(1 - n1)*(1 - n2)*n3 + P1110*(1 - p)*(1 - n1)*n2 + P0110*(1 - n1)*n2 + P0111*(1 - n1)*n2*n3 + P0111*(1 - n1)*n2*(1 - n3) + P0111*(1 - n1)*(1 - n2)*n3 + P1101*(1 - p)*(1 - n1)*n3 + P1011*(1 - p)*n2*n3 + P0101*(1 - n1)*n3
P0111 == P0111*n1*n2*n3 + P1111*(1 - p)*n1*n2*n3
P1001 == P1001*p*n3 + P1011*p*(1 - n2)*n3
P0101 == P0101*n1*n3 + P1111*(1 - p)*n1*(1 - n2)*n3 + P1101*(1 - p)*n1*n3 + P0111*n1*(1 - n2)*n3
P1101 == P1101*p*n1*n3 + P1111*p*n1*(1 - n2)*n3 + P1011*(1 - p)*(1 - n2)*n3 + P1001*(1 - p)*n3
P1011 == P1011*p*n2*n3 + P1111*p*(1 - n1)*n2*n3 + P1111*p*(1 - n1)*n2*(1 - n3) + P1111*p*(1 - n1)*(1 - n2)*n3 + P1101*p*(1 - n1)*n3 + P1110*p*(1 - n1)*n2
P1000 + P1100 + P0100 + P1110 + P1010 + P0110 + P1111 + P0111 + P1001 + P0101 + P1101 + P1011 == 1
[P1000; P1100; P0100; P1110; P1010; P0110; P1111; P0111; P1001; P0101; P1101; P1011] := Minerr(P1000, P1100, P0100, P1110, P1010, P0110, P1111, P0111, P1001, P0101, P1101, P1011) = [0.0104943; 0.0305443; 0.0652049; 0.130018; 0.02959; 0.0922075; 0.325927; 0.0935115; 0.0128363; 0.0540946; 0.0347361; 0.120824]
Pотк := n2*n3*(P0111 + P1111)/(P0100 + P1110 + P0110 + P0101 + P1101 + P1111 + P1100 + P0111) = 0.324893
Pблок := P0100 + P0110 + P0111 + P0101 = 0.305018
Lсистема := 0*P1000 + 1*(P1100 + P0100 + P1010 + P1001) + 2*(P1110 + P0110 + P0101 + P1101 + P1011) + 3*(P1111 + P0111) = 2.26025
Qотн := 1 - Pотк = 0.675107
A := (P1110 + P1010 + P0110 + P1111 + P0111 + P1011)*(1 - n2) + (P1001 + P0101 + P1101 + P1111 + P0111 + P1011)*(1 - n3) = 0.286802
1/(1 - n1) = 2
1/(1 - n2) = 5
1/(1 - n3) = 5
W23 := P1111 + P0111 + P1011 = 0.540263
W3 := P1001 + P0101 + P1101 + W23 = 0.64193
W2 := P1110 + P1010 + P0110 + W23 = 0.792078
W1 := P0100 + P1110 + P0110 + P0101 + P1101 + P1111 + P1100 + P0111 = 0.826244
A2 := (1 - n2)*(P1110 + P1010 + P0110 + P1111 + P0111 + P1011) = 0.158416
A3 := (1 - n3)*(P1001 + P0101 + P1101 + P1111 + P0111 + P1011) = 0.128386
Wc := (1/(1 - n1)) + (1/(1 - n2))*A2/(A2 + A3) + (1/(1 - n3))*A3/(A2 + A3) = 7
Kкан1 := P1100 + P0100 + P1110 + P0110 + P1111 + P0111 + P0101 + P1101 = 0.826244
Kкан2 := P1110 + P1010 + P0110 + P1111 + P0111 + P1011 = 0.792078
Kкан3 := P1111 + P0111 + P1001 + P0101 + P1101 + P1011 = 0.64193
