m := 0.5
P0 := 0
P6 := 0
L := 0.9
P1 := 0
P7 := 0
p := 0.3
P2 := 0
P8 := 0
L1 := L*p
P3 := 0
P9 := 0
L2 := L*(1 - p)
P4 := 0
P5 := 0
Given
P0 == (P1*m + P2*m)/(L1 + L2)
P00 + 0
P00 + 1
P1 == (P0*L1 + P3*m)/(L1 + m + L2)
P00 + 2
P2 == (P0*L2 + P4*m + P8*m)/(m + L1 + L2)
P01 + 1
P3 == (P1*L1 + P5*m)/(m + L1 + L2)
P02 + 1
P4 == (P1*L2 + P6*m + P2*L1)/(L1 + m + L2)
P11 + 1
P5 == (P3*L1 + P6*L1)/m
P21 + 1
P6 == (P4*L1 + P7*L1 + P3*L2)/(L1 + m)
P22 + 1
P7 == (P4*L2 + P9*L1 + P8*L1)/(L1 + m)
P02 + 2
P8 == (P7*m + P9*m + P2*L2)/(L1 + m + L2)
P9 == P8*L2/(L1 + m)
P22 + 2
P1 + P2 + P3 + P4 + P5 + P6 + P7 + P8 + P9 == 1
Minerr(P0, P1, P2, P3, P4, P5, P6, P7, P8, P9) = [0.0919794; 0.030893; 0.13467; 0.0368317; 0.0838933; 0.0864464; 0.123254; 0.181669; 0.177288; 0.145054]
[rP0; rP1; rP2; rP3; rP4; rP5; rP6; rP7; rP8; rP9] := [0.092; 0.031; 0.135; 0.037; 0.084; 0.086; 0.123; 0.182; 0.177; 0.145]
P1otk := rP5 = 0.086
Pnv := rP5 + rP7 + rP6 + rP9
P2otk := Pnv + (1 - Pnv)*(rP9 + rP7 + rP6)/(rP2 + rP4 + rP6 + rP8 + rP7 + rP9)*L1/(L1 + m) = 0.622543
Q1 := 1 - P1otk = 0.914
Q2 := 1 - P2otk = 0.377457
